# CONSTANTS
h := 4.135667516*10^-15*s
h_2π := h/(2*π)
h_2π = 6.58212*10^-16
c = 299792458 m/s
# INPUT DATA:
# position of minimum of degree at fixed wavelength of source
X_min := 0
φ_min := [58.1 °; 58 °; 58.3 °; 58.6 °; 59.2 °]
X_max := 5
N := 200
λ := [550*10^-9*m; 650*10^-9*m; 750*10^-9*m; 850*10^-9*m; 950*10^-9*m]
n := tan(φ_min)
eV := h*c/λ
n = [1.60657; 1.60033; 1.61914; 1.63826; 1.67752]
eV = [2.25426; 1.90745; 1.65312; 1.45864; 1.3051]
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# MODELLING:
# REGRESSION
# P_order:
# - 0
# - 1 = linear
# - 2 = x^2+x+c
# - 3 = x^3+x^2+x+c
# - 4 = x^4+x^3+x^2+x+c
P_order := 3
i := 0 .. N - 1
x[i] := X_min + X_max*i/N
func := regress(eV, n, P_order)
v(x) := interp(func, eV, n, x)
func = [3; 3; 3; 2.75572; -1.5583; 0.691076; -0.100251]
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data :=
    z ← 1
    for i ∈ 0 .. N - 1
        if v(x[i]) ≥ 0
            T[i, 0] ← x[i]
            T[i, 1] ← v(x[i])
    T
data = [
    0, 2.75572;
    0.025, 2.7172;
    0.05, 2.67952;
    0.075, 2.6427;
    0.1, 2.6067;
    0.125, 2.57154;
    0.15, 2.53719;
    0.175, 2.50365;
    0.2, 2.4709;
    0.225, 2.43895
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]
outX := WRITEPRN("bruster_eV.txt", data[:, 0])
outY := WRITEPRN("bruster_n.txt", data[:, 1])
